// COMSOL Multiphysics 5.5.0.359 model "3D_model_2D_cilindelrs.mph"
// Outline of the model tree

Parameters
  a = 10[cm]
  d = 5 [cm]
  c_air = 343[m/s]
  rho_air = 1.18[kg/m^3]
  Z_air = rho_air*c_air
  L = 1.7[m]
  xs = 10 [cm]  // Distance speaker to edge
  Mms = 0.5 [g]
  Qms = 3.19  // mechanical quality factor
  Cms = 1/(4*pi^2*fs^2*Mms)
  Rms = Sd*Z_air  // Active
  Rms0 = 1/(ws*Qms*Cms)  // mechanical resistance (passive)
  Sd = 2*pi*a*d
  fs = 270 [Hz]
  ws = 2*pi*fs

Variables
  var2 "Variables 1"
    w = 2*pi*freq
    Zin = aveop2(p)/aveop2(acpr.vx)
    Zs = (iw*Mms+Rms+1/(iw*Cms))/Sd  // active
    Zs0 = (iw*Mms+Rms0+1/(iw*Cms))/Sd  // passive
    iw = i*w
    Zout = aveop3(acpr.p_t)/aveop3(acpr.vz)
    alpha_air = 3e-5/a*sqrt(freq/1[Hz])
    Zp = Rms/Sd  // Z_air
    k = w/c_air

Couplings
  aveop1: Average "Average 1 Middle" on boundaries 54
  aveop2: Average "Average 2 Source" on boundaries 59
  aveop3: Average "Average 3 Out" on boundaries 1

Geometry
  geom1 "Geometry 1" (3D, length unit m)
    cyl1: Cylinder | axistype = x; r = 0.1
    blk1: Block | pos = {xs, -0.025, 0.095}; size = {5e-2, 5e-2, 0.005}
    uni1: Union | input = blk1, cyl1; intbnd = off; face = all
    wp1: WorkPlane | quickz = 0.1; unite = on
      c1: Circle | pos = {xs+0.025, 0}; r = 0.025
    wp2: WorkPlane | quickz = -0.1; unite = on
      c1: Circle | pos = {xs+0.025, 0}; r = 0.025
    blk2: Block | pos = {xs, -0.025, -0.100}; size = {5e-2, 5e-2, 0.005}
    uni2: Union | input = blk2, uni1; intbnd = off; face = all
    wp3: WorkPlane | quickplane = xz; quicky = -0.1; quickz = -0.1; unite = on
      c1: Circle | pos = {xs+0.025, 0}; r = 0.025
    blk3: Block
      workplane = xyplane
      pos = {xs + 5[cm], -0.1, -0.025}
      rot = 90
      axistype = y
      size = {5e-2, 5e-2, 0.005}
    uni3: Union | input = blk3, uni2; intbnd = off; face = all
    wp4: WorkPlane | quickplane = xz; quicky = 0.1; quickz = -0.1; unite = on
      c1: Circle | pos = {xs+0.025, 0}; r = 0.025
    blk4: Block
      workplane = xyplane
      pos = {xs + 5[cm], 0.095, -0.025}
      rot = 90
      axistype = y
      size = {5e-2, 5e-2, 0.005}
    uni4: Union | input = blk4, uni3; intbnd = off; face = all
    wp5: WorkPlane | quickplane = zy; quickx = 0.5; quicky = 0.1; quickz = -0.1; unite = on
      c1: Circle | r = 0.1
    fin: Finalize "Form Union"

Materials
  mat1: Common "Air" on all domains
    def "Basic"
      thermalexpansioncoefficient = alpha_p(pA,T)
      molarmass = 0.02897[kg/mol]
      bulkviscosity = muB(T)
      relpermeability = 1
      relpermittivity = 1
      dynamicviscosity = eta(T)
      ratioofspecificheat = 1.4
      electricconductivity = 0[S/m]
      heatcapacity = Cp(T)
      density = rho(pA,T)
      thermalconductivity = k(T)
      soundspeed = cs(T)
      eta: Piecewise | arg = T; pieces = {200.0, 1600.0, -8.38278E-7+8.35717342E-8*T^1-7.69429583E-11*T^2+4.6437266E-14*T^3-1.06585607E-17*T^4}; argunit = K; fununit = Pa*s
      Cp: Piecewise | arg = T; pieces = {200.0, 1600.0, 1047.63657-0.372589265*T^1+9.45304214E-4*T^2-6.02409443E-7*T^3+1.2858961E-10*T^4}; argunit = K; fununit = J/(kg*K)
      rho: Analytic | expr = pA*0.02897/R_const[K*mol/J]/T; args = {pA, T}; dermethod = manual; argders = {{pA, d(pA*0.02897/R_const/T,pA)}, {T, d(pA*0.02897/R_const/T,T)}}; argunit = Pa,K; fununit = kg/m^3
      k: Piecewise | arg = T; pieces = {200.0, 1600.0, -0.00227583562+1.15480022E-4*T^1-7.90252856E-8*T^2+4.11702505E-11*T^3-7.43864331E-15*T^4}; argunit = K; fununit = W/(m*K)
      cs: Analytic | expr = sqrt(1.4*R_const[K*mol/J]/0.02897*T); args = T; dermethod = manual; argunit = K; fununit = m/s
      an1: Analytic | funcname = alpha_p; expr = -1/rho(pA,T)*d(rho(pA,T),T); args = {pA, T}; argunit = Pa,K; fununit = 1/K
      an2: Analytic "Analytic 2a" | funcname = muB; expr = 0.6*eta(T); args = T; argunit = K; fununit = Pa*s
    RefractiveIndex
      n = 1
      ki = 0
    NonlinearModel
      BA = (def.gamma+1)/2

Physics
  acpr: PressureAcoustics "Pressure Acoustics, Frequency Domain" on domains 1, 2
    dependent variable p
    fpam1: FrequencyPressureAcousticsModel "Pressure Acoustics 1" (default)
      FluidModel = Attenuation
      alpha1 = alpha_air
      rho_mat = from_mat
    shb1: SoundHard "Sound Hard Boundary (Wall) 1" (default)
    init1: init "Initial Values 1" (default)
    imp1: Impedance on boundaries 26, 27 | Zi = Zs0
    imp2: Impedance on boundaries 22, 23 | Zi = Zs0
    imp3: Impedance on boundaries 11, 12 | Zi = Zs0
    imp4: Impedance on boundaries 36, 37 | Zi = Zs0
    pr1: Pressure "Pressure 1 - Source" on boundaries 59 | p0 = 1
    pr2: Pressure "Pressure 2 - Open Tube" on boundaries 1
    nvel1: NormalVelocity (disabled) on boundaries 11, 12, 22, 23, 26, 27, 36, 37 | nvel = 0

Mesh
  mesh1 "Mesh 1"
    size: MeshSizeDefault | hmax = 0.1; hmin = 0.018; hgrad = 1.5
    ftet1: FreeTet "Free Tetrahedral 1" on remaining entities

Studies
  std1 "Study 1"
    freq: Frequency "Frequency Domain" | plist = 10^{range(log10(20),1/1000,log10(2000))}

Solver configurations
  sol1 "Solution 1" (study std1)
    v1: Variables "Dependent Variables 1"
    s1: Stationary "Stationary Solver 1"
      p1: Parametric
        pname = freq
        plistarr = 10^{range(log10(20),1/1000,log10(2000))}
        punit = Hz
        pcontinuationmode = no
      fc1: FullyCoupled | linsolver = d1
      d1: Direct "Suggested Direct Solver (acpr)"
  sol2 "Solution 1 - Zs & alpha_air" (study std1)
  sol3 "Solution 1 - Zp ( Passive)" (study std1)
  sol4 "Solution 1 - Hardwall" (study std1)
  sol5 "Solution 1 - Hardwall_new" (study std1)
  sol6 "Solution 1 - Active" (study std1)
  sol7 "Solution 1 -Passive" (study std1)

Datasets
  dset1: Solution | solution = sol1
  dset2: Solution | solution = sol2
  dset3: Solution | solution = sol3
  dset4: Solution | solution = sol4
  dset5: Solution | solution = none
  dset6: Solution | solution = sol5
  dset7: Solution | solution = sol6
  dset8: Solution | solution = sol7

Plots
  pg1: PlotGroup3D "Acoustic Pressure (acpr)" | data = dset1
    surf1: Surface | expr = acpr.p_t
  pg2: PlotGroup3D "Sound Pressure Level (acpr)" | data = dset1
    surf1: Surface | expr = acpr.Lp
  pg3: PlotGroup3D "Acoustic Pressure, Isosurfaces (acpr)" | data = dset1
    iso1: Isosurface | expr = acpr.p_t
  pg5: PlotGroup1D "1D Plot Group 5" | data = dset1; xlabel = Frequency (Hz); ylabel = Magnitude (dB)
    glob1: Global
      data = dset7
      expr = 20*log10(abs(Zin/Z_air))
      descr = Active
      typeintitle = off
      descriptionintitle = off
      unitintitle = off
      legends = Active
    glob2: Global
      data = dset6
      expr = 20*log10(abs(Zin/Z_air))
      descr = Hardwall
      typeintitle = off
      descriptionintitle = off
      unitintitle = off
    glob3: Global
      data = dset8
      expr = 20*log10(abs(Zin/Z_air))
      descr = Hardwall - air damping
      typeintitle = off
      descriptionintitle = off
      unitintitle = off
      legends = Passive